A := [3, -1; 4, -2]
v1 := [1; -1]
v2 := [2; 0]
transpose(transpose(v1)*A) - A*v2 = [-7; -7]
B := [2, 1; -1, 3]
C := [1, 1; 1, 7]
B*C = [3, 9; 2, 20]
C*B = [1, 4; -5, 22]
v := [1; -3]
u := [2; -2]
B*C*v = [-24; -58]
B*C*u - B*C*v = [12; 22]
D := [1, 2, 1; 1, 0, -1; 0, 2, 3]
E := [2, 1, -1; 1, 0, 1; -1, 1, 0]
D*E = [3, 2, 1; 3, 0, -1; -1, 3, 2]
E*D = [3, 2, -2; 1, 4, 4; 0, -2, -2]
D^-1 = [-1, 2, 1; 1.5, -1.5, -1; -1, 1, 1]  # vynásobením matice a její inverzni matice vznikne jednotková matice
D*D^-1 = [1, 0, 0; 0, 1, 0; 0, 0, 1]
M := [3, -4, 5; 2, -3, 1; 3, -5, -1]
M^-1 = [-8, 29, -11; -5, 18, -7; 1, -3, 1]
